// COMSOL Multiphysics 5.5.0.359 model "circunferencia.mph"
// Outline of the model tree

Parameters
  H = 1
  T = 0.1
  lam_0 = 1
  lam_T = lam_0/((1-T^4)^(1/2))
  lam2 = lam_T*lam_T
  Ac = 314.1592
  Lc = sqrt(Ac)
  Lt = sqrt((2*Ac)/(sqrt(3)))
  Ah = (Ac-4*pi)

Geometry
  geom1 "Geometría 1" (2D, length unit m)
    c1: Circle "Círculo 1" | r = 10
    fin: Finalize "Formar unión"

Physics
  c: CoefficientFormPDE "EDP en forma de coeficientes" on all domains
    dependent variable u
    cfeq1: CoefficientFormPDE "EDP en forma de coeficientes 1" (default) | c = {lam2, 0, 0, lam2}; a = 1; f = 0; da = 0
    zflx1: ZeroFluxBoundary "Flujo cero 1" (default)
    init1: init "Valores iniciales 1" (default)
    dir1: DirichletBoundary "Condición de contorno de Dirichlet 1" on all boundaries | r = H

Mesh
  mesh1 "Malla 1" (physics-controlled)
    size: MeshSizeDefault "Tamaño" | hauto = 2

Studies
  std1 "Estudio 1"
    stat: Stationary "Estacionario"

Solver configurations
  sol1 "Solución 1" (study std1)
    v1: Variables "Variables dependientes 1"
    s1: Stationary "Resolvedor estacionario 1"
      dDef: Direct "Directo"
      fc1: FullyCoupled "Completamente acoplado 1" | linsolver = dDef

Datasets
  dset1: Solution | solution = sol1
  cln1: CutLine2D "Linea de corte en 2D 1" | data = dset1; genpoints = {{0, -10}, {0, 10}}

Derived values
  int1: IntSurface "Integración en superficie 1" on domains 1 | data = dset1; table = tbl1; expr = u/Ah; unit = m^2
  int2: IntSurface "Integración en superficie 2" on domains 1 | data = dset1; table = tbl2; expr = u

Tables
  tbl2: Table "Tabla 2"
    // Integración en superficie 2
    Variable dependiente u (m^2) | Variable dependiente u (m^2) | Variable dependiente u (m^2)
    0 | 220.082 | 238.422

Plots
  pg1: PlotGroup2D "Grupo gráfico 2D 1" | data = dset1
    surf1: Surface "Superficie 1" | data = dset1; expr = u
    arws1: ArrowSurface "Superficie de flechas 1" | expr = {uy, -ux}; xnumber = 30; ynumber = 30
  pg2: PlotGroup1D "Grupo gráfico 1D 2" | data = cln1
    lngr1: LineGraph "Gráfico lineal 1" | expr = u