// COMSOL Multiphysics 5.5.0.359 model "triangulo_OK.mph"
// Outline of the model tree

Parameters
  r = 1  // Radio Hueco
  L = 10  // Lado Cuadrado
  T = 0.9
  lam1 = 1  // Disco Grande
  lam2 = 0.1  // Moneda
  lam1_T = lam1/sqrt(1-T*T*T*T)
  lam2_T = lam2/sqrt(1-T*T*T*T)
  H = 0.5
  A = L*L  // Area constante total
  R = sqrt(100/pi)  // Radio de Circulo
  L_tri = sqrt((4*A)/(sqrt(3)))  // Lado del triangulo

Geometry
  geom1 "Geometría 1" (2D, length unit m)
    ls1: LineSegment "Segmento de línea 1"
      specify1 = coord
      coord1 = {-L_tri/2, -(sqrt(3)/6*L_tri)}
      specify2 = coord
      coord2 = {L_tri/2, -(sqrt(3)/6*L_tri)}
    ls2: LineSegment "Segmento de línea 2" | vertex1 = ls1(1) points 2; specify2 = coord; coord2 = {0, (sqrt(3)/3*L_tri)}
    ls3: LineSegment "Segmento de línea 3" | vertex1 = ls2(1) points 2; vertex2 = ls1(1) points 1
    csol1: ConvertToSolid "Convertir a sólido 1" | input = ls1, ls2, ls3
    fin: Finalize "Formar unión"

Physics
  c: CoefficientFormPDE "EDP en forma de coeficientes" on all domains
    dependent variable u
    cfeq1: CoefficientFormPDE "EDP en forma de coeficientes 1" (default)
      c = {lam1_T*lam1_T, 0, 0, lam1_T*lam1_T}
      a = 1
      f = 0
      da = 0
    zflx1: ZeroFluxBoundary "Flujo cero 1" (default)
    init1: init "Valores iniciales 1" (default)
    dir1: DirichletBoundary "Condición de contorno de Dirichlet 1" on all boundaries | r = H

Mesh
  mesh1 "Malla 1" (physics-controlled)
    size: MeshSizeDefault "Tamaño" | hauto = 2

Studies
  std1 "Estudio 1"
    stat: Stationary "Estacionario"

Solver configurations
  sol1 "Solución 1" (study std1)
    v1: Variables "Variables dependientes 1"
    s1: Stationary "Resolvedor estacionario 1"
      dDef: Direct "Directo"
      fc1: FullyCoupled "Completamente acoplado 1" | linsolver = dDef

Datasets
  dset1: Solution | solution = sol1

Derived values
  int1: IntSurface "Integración en superficie 1" on domains 1 | data = dset1; table = tbl1; expr = {u, u/A}
  int2: IntSurface "Integración en superficie 2" on domains 1 | data = dset1; table = tbl2; expr = u/100

Tables
  tbl2: Table "Tabla 2"
    // Integración en superficie 2
    u/100 (m^2)
    0.250997

Plots
  pg1: PlotGroup2D "Grupo gráfico 2D 1" | data = dset1
    surf1: Surface "Superficie 1" | expr = u